// COMSOL Multiphysics 5.3.0.316 model "multimorph_prestress_lite.mph"
// Outline of the model tree

Parameters
  x_bm = 0 [um]  // x substrate margin
  x_bh = 200 [um]  // x substrate height
  x_lo = 350 [um]  // x beam layer overhang
  x_ld = 20 [um]  // x beam layer depth
  x_lh = 1 [um]  // x beam layer height
  x_sw = 100 [um]  // x support width
  n = 3  // number of beam layers
  bw = lw + 2*x_bm  // substrate width
  bd = x_ld + 2*x_bm  // substrate depth
  ew = bw/2 - x_sw/2  // etched width
  ed = bd  // etched depth
  eh = x_sh  // etched height
  x_sh = 10 [um]  // x support height
  lw = x_sw + 2*x_lo  // beam layer width
  ld = x_ld  // beam layer depth
  lh = x_lh  // beam layer height
  bh = x_bh  // substrate height
  aw = lw  // air gap width
  ah = eh  // air gap height
  Tb_ref = 293.15  // initial metal temperature
  Tb = 293.15  // beam temperature
  mesh_lx = round(mesh_sz*x_lo/x_sh)  // beam layer elements x
  mesh_lz = 2  // beam layer elements z
  mesh_ly = round(mesh_sz*(ld/2)/x_sh)  // beam layer elements y
  mesh_sz = 3  // air gap elements z
  mesh_bz = round((bh-x_sh)/x_sh)  // substrate elements z
  mesh_sx = round(mesh_sz*(x_sw/2)/ah)  // substrate elements x
  S0 = 0[GPa]  // pre-stress

Selections
  box1: Box "Symmetry plane yz" | entitydim = 2; xmin = 0; xmax = 0; condition = inside
  box2: Box "Symmetry plane zx" | entitydim = 2; ymin = 0; ymax = 0; condition = inside
  box3: Box "Origin line xy" | entitydim = 1; xmin = 0; xmax = 0; ymin = 0; ymax = 0; condition = inside
  int1: Intersection "Beam origin edges xy" | entitydim = 1; input = {box3, geom1_csel1_edg}
  box4: Box "Bottom of beam boundaries"
    entitydim = 2
    inputent = selections
    input = {geom1_csel1_bnd}
    zmin = bh
    zmax = bh
    condition = inside
  box7: Box "Top of air gap boundaries"
    entitydim = 2
    input = {geom1_csel1_bnd}
    zmin = bh
    zmax = bh
    condition = inside
  box8: Box "Bottom of air gap boundaries" | entitydim = 2; zmin = bh-x_sh; zmax = bh-x_sh; condition = inside
  box9: Box "Air gap and support domains" | entitydim = 3; zmin = bh-x_sh; zmax = bh; condition = inside
  box10: Box "Air gap" | entitydim = 3; xmin = x_sw/2; zmin = bh-x_sh; zmax = bh; condition = inside
  uni1: Union "Linear elastic domains" | entitydim = 3; input = {geom1_csel1_dom, geom1_csel2_dom}

Couplings
  root.comp1.field1.intop_ee: Integration on no domains | intorder = 8; frame = mesh
  root.comp1.field2.intop_ee: Integration on no domains | intorder = 8; frame = material
  root.comp1.field4.intop_ee: Integration on domains 1-5 | intorder = 8; frame = material

Geometry
  geom1 "Geometry 1" (3D, length unit µm)
    blk1: Block "Substrate" | size = {bw/2, bd/2, bh}
    wp1: WorkPlane "Top of air gap 1"
      contributeto = none
      planetype = faceparallel
      face = blk1(1) boundaries 4
      originvertex = blk1(1) points 8
      origin = vertexproj
      unite = on
    blk2: Block "Air gap" | workplane = wp1; pos = {0, 0, -eh}; size = {ew, ed/2, eh}
    dif1: Difference "Etch" | contributeto = csel2; input = blk1; input2 = blk2; keep = on
    wp2: WorkPlane "Top of air gap 2"
      contributeto = none
      planetype = faceparallel
      face = dif1(1) boundaries 4
      originvertex = dif1(1) points 2
      origin = vertexproj
      unite = on
    blk3: Block "Layer" | workplane = wp2; pos = {-lw/2, -ld/2, 0}; size = {lw/2, ld/2, lh}
    arr1: Array "Stack layers"
      contributeto = csel1
      input = blk3
      size = n
      type = linear
      linearsize = n
      displ = {0, 0, lh}
    fin: Finalize "Form Union"
    pard1: PartitionDomains "Partition Substrate"
      domain = fin(1) domains 1
      partitionwith = extendedfaces
      workplane = wp2
      extendedface = fin(1) boundaries 20

Materials
  mat1: Common "Si - Silicon (single-crystal, isotropic)" on selection geom1_csel2_dom
    def "Basic"
      thermalexpansioncoefficient = 2.6e-6[1/K]
      heatcapacity = 700[J/(kg*K)]
      relpermittivity = 11.7
      density = 2329[kg/m^3]
      thermalconductivity = 130[W/(m*K)]
    Enu "Young's modulus and Poisson's ratio"
      youngsmodulus = 170e9[Pa]
      poissonsratio = 0.28
  mat4: Common "Au - Gold" on domains 5
    def "Basic"
      electricconductivity = 45.6e6[S/m]
      thermalexpansioncoefficient = 14.2e-6[1/K]
      heatcapacity = 129[J/(kg*K)]
      density = 19300[kg/m^3]
      thermalconductivity = 317[W/(m*K)]
    Enu "Young's modulus and Poisson's ratio"
      youngsmodulus = 70e9[Pa]
      poissonsratio = 0.44
  mat7: Common "Si3N4 - Silicon nitride" on domains 4
    def "Basic"
      electricconductivity = 0[S/m]
      thermalexpansioncoefficient = 2.3e-6[1/K]
      heatcapacity = 700[J/(kg*K)]
      relpermittivity = 9.7
      density = 3100[kg/m^3]
      thermalconductivity = 20[W/(m*K)]
    Enu "Young's modulus and Poisson's ratio"
      youngsmodulus = 250e9[Pa]
      poissonsratio = 0.23
  mat6: Common "SiO2 - Silicon oxide" on domains 3
    def "Basic"
      electricconductivity = 0[S/m]
      thermalexpansioncoefficient = 0.5e-6[1/K]
      heatcapacity = 730[J/(kg*K)]
      relpermittivity = 4.2
      density = 2200[kg/m^3]
      thermalconductivity = 1.4[W/(m*K)]
    Enu "Young's modulus and Poisson's ratio"
      youngsmodulus = 70e9[Pa]
      poissonsratio = 0.17
  mat2: Common "Air" on selection box10
    def "Basic"
      dynamicviscosity = eta(T[1/K])[Pa*s]
      ratioofspecificheat = 1.4
      electricconductivity = 0[S/m]
      heatcapacity = Cp(T[1/K])[J/(kg*K)]
      density = rho(pA[1/Pa],T[1/K])[kg/m^3]
      thermalconductivity = k(T[1/K])[W/(m*K)]
      soundspeed = cs(T[1/K])[m/s]
      relpermittivity = 1
      eta: Piecewise | arg = T; pieces = {200.0, 1600.0, -8.38278E-7+8.35717342E-8*T^1-7.69429583E-11*T^2+4.6437266E-14*T^3-1.06585607E-17*T^4}
      Cp: Piecewise | arg = T; pieces = {200.0, 1600.0, 1047.63657-0.372589265*T^1+9.45304214E-4*T^2-6.02409443E-7*T^3+1.2858961E-10*T^4}
      rho: Analytic | expr = pA*0.02897/8.314/T; args = {pA, T}; dermethod = manual; argders = {{pA, d(pA*0.02897/8.314/T,pA)}, {T, d(pA*0.02897/8.314/T,T)}}
      k: Piecewise | arg = T; pieces = {200.0, 1600.0, -0.00227583562+1.15480022E-4*T^1-7.90252856E-8*T^2+4.11702505E-11*T^3-7.43864331E-15*T^4}
      cs: Analytic | expr = sqrt(1.4*287*T); args = T; dermethod = manual; argders = {T, d(sqrt(1.4*287*T),T)}
  sw1: Switch "Metal" (disabled) on domains 5
    mat2: Common "Au - Gold"
      def "Basic"
        electricconductivity = 45.6e6[S/m]
        thermalexpansioncoefficient = 14.2e-6[1/K]
        heatcapacity = 129[J/(kg*K)]
        density = 19300[kg/m^3]
        thermalconductivity = 317[W/(m*K)]
      Enu "Young's modulus and Poisson's ratio"
        youngsmodulus = 70e9[Pa]
        poissonsratio = 0.44
    mat1: Common "Al - Aluminum / Aluminium"
      def "Basic"
        electricconductivity = 35.5e6[S/m]
        thermalexpansioncoefficient = 23.1e-6[1/K]
        heatcapacity = 904[J/(kg*K)]
        density = 2700[kg/m^3]
        thermalconductivity = 237[W/(m*K)]
      Enu "Young's modulus and Poisson's ratio"
        youngsmodulus = 70.0e9[Pa]
        poissonsratio = 0.35
    mat3: Common "Ti - Titanium"
      def "Basic"
        electricconductivity = 2.6e6[S/m]
        thermalexpansioncoefficient = 8.60e-6[1/K]
        heatcapacity = 522[J/(kg*K)]
        density = 4506[kg/m^3]
        thermalconductivity = 21.9[W/(m*K)]
      Enu "Young's modulus and Poisson's ratio"
        youngsmodulus = 115.7e9[Pa]
        poissonsratio = 0.321

Physics
  emi: Electromechanics on all domains
    dependent variable u = {u, v, w}
    free1: FreeDeformation (default)
    eqm1: ElectromechanicsQuasistaticModel "Electrical Material Model 1" (default)
    zc1: ZeroCharge (default)
    free2: Free (default)
    emd1: ElectromechanicalInterface (default)
    disp1: PrescribedMeshDisplacement (default) | useDx = {1, 1, 0}
    init1: init "Initial Values 1" (default)
    lemm1: LinearElasticModel "Linear Elastic Material 1" on selection uni1
      iss1: InitialStressandStrain on selection geom1_csel1_dom | Sil = diag{0, 0, S0}
      te1: ThermalExpansion on all domains | minput_temperature = Tb
    sym1: SymmetrySolid "Symmetry yz" on selection box1
    sym2: SymmetrySolid "Symmetry zx" on selection box2
    term1: Terminal on selection box7 | TerminalType = Voltage
    gnd1: Ground on selection box8
    gr1: Gravity on selection uni1
    fix1: Fixed "Fixed Constraint 1" on boundaries 3

Mesh
  mesh1 "Mesh"
    size: MeshSizeDefault | hmax = 42; hmin = (ld/2)/mesh_ly; hgrad = 1; custom = on
    map1: Map "Mapped top of support" on selection box7
      dis1: Distribution "Distribution lx" on edges 33, 36
        type = predefined
        reverse = on
        elemcount = floor(mesh_lx/2)
        elemratio = 2
        method = geometric
      dis2: Distribution "Distribution ly" on edges 8, 32, 42 | numelem = mesh_ly
      dis3: Distribution "Distribution bm" on no edges | numelem = mesh_ly
      dis4: Distribution "Distribution sx" on edges 9, 23
        type = predefined
        reverse = on
        elemcount = floor(mesh_sx/4)
        elemratio = 2
        method = geometric
    swe1: Sweep "Swept beam" on selection geom1_csel1_dom
      sweeppath = straight
      targetmesh = rigid
      sourceface = selection box4
      targetface = boundaries 16
      dis1: Distribution "Distribution lz" on selection geom1_csel1_dom | numelem = mesh_lz
    swe2: Sweep "Swept air gap and support" on selection box9
      sweeppath = straight
      targetmesh = rigid
      sourceface = selection box7
      targetface = selection box8
    swe3: Sweep "Swept substrate" on domains 1
      dis1: Distribution "Distribution bz" on domains 1
        type = predefined
        elemcount = floor(mesh_bz/5)
        elemratio = 5
        method = geometric

Studies
  std1 "Prestressed characteristic study"
    stat: Stationary
      useparam = on
      sweeptype = filled
      pname = {S0, Tb}
      plistarr = {-0.87, range(0,10,400)}
      punit = {GPa, degC}
  std2 "Prestress study"
    stat: Stationary | useparam = on; pname = S0; plistarr = range(0,-0.01,-1); punit = GPa

Tables
  tbl1: Table
    // emi.C11, w (emi.C11, w)
    S0 (GPa) | Tb (degC) | Maxwell capacitance (fF), Point: 22 | Displacement field, Z component (µm), Point: 22
    -0.87 | 0 | 1.18583 | 106.34
    -0.87 | 10 | 1.1986 | 103.41
    -0.87 | 20 | 1.21392 | 100.059
    -0.87 | 30 | 1.23035 | 96.6302
    -0.87 | 40 | 1.24772 | 93.1731
    -0.87 | 50 | 1.26608 | 89.6934
    -0.87 | 60 | 1.2855 | 86.1924
    -0.87 | 70 | 1.30608 | 82.6709
    -0.87 | 80 | 1.32791 | 79.1297
    -0.87 | 90 | 1.35111 | 75.5697
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